y_pos := -0.707
z_pos := 0.707
# Given a unit direction vector with coordinates X, Y and Z:
# To determine roll, take acos of Z.
# To determine pitch, you need another vector, so I just set it to 0.
# To determine yaw, create a new vector where X=X, Y=Y and Z=0
# Normalize this vector. Take acos of Y. If X <= 0, multiply by -1. Otherwise leave it.
x := acos(z_pos) = 45.0087 deg
y := 0
z := -acos(-y_pos) = -45.0087 deg
roll := [1, 0, 0; 0, cos(x), -sin(x); 0, sin(x), cos(x)]
pitch := [cos(y), 0, sin(y); 0, 1, 0; -sin(y), 0, cos(y)]
yaw := [cos(z), -sin(z), 0; sin(z), cos(z), 0; 0, 0, 1]
Rot := yaw*pitch*roll = [0.707, 0.5, -0.500151; -0.707214, 0.499849, -0.5; 0, 0.707214, 0.707]
# Order of matrices is important.
# The robot program seems to do a roll, then pitch and then yaw when it figures out its rotationvector.
θ := acos((Rot[0, 0] + Rot[1, 1] + Rot[2, 2] - 1)/2) = 62.8112 deg
multi := 1/(2*sin(θ)) = 32.2065 deg
r_x := multi*(Rot[2, 1] - Rot[1, 2])*θ = 42.6228 deg
ry := multi*(Rot[0, 2] - Rot[2, 0])*θ = -17.6587 deg
rz := multi*(Rot[1, 0] - Rot[0, 1])*θ = -42.6228 deg
